*Heading
** Job name: Job-Man Model name: Job-Man
** Generated by: Abaqus/CAE 2020
*Preprint, echo=NO, model=NO, history=NO, contact=NO
**
** PARTS
**
*Part, name=CHEST-LEFT
*Node
      1, 0.0286689997,   1.12039995, 0.0836270005
      2,  0.144069999,   1.13032997, 0.0159370005
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*Element, type=S3
   1, 302, 778, 630
   2, 193, 209, 391
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*Nset, nset=Set-FIX
  23,  26,  51,  58,  65,  67
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*Elset, elset=Set-ALL, generate
    1,  1722,     1
*Elset, elset=_Surf-OUT_SPOS, internal, generate
    1,  1722,     1
*Surface, type=ELEMENT, name=Surf-OUT
_Surf-OUT_SPOS, SPOS
*Elset, elset=_Surf-INN_SNEG, internal, generate
    1,  1722,     1
*Surface, type=ELEMENT, name=Surf-INN
_Surf-INN_SNEG, SNEG
** Section: Section-DS20
*Shell Section, elset=Set-ALL, material=DRAGONSKIN20-OGDEN
0.001, 5
*End Part
**
*Part, name=CHEST-RIGHT
*Node
      1, -0.0648330003,   1.23278999,  0.077391997
      2, -0.0940150023,   1.11300004, 0.0486660004
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*Element, type=S3
   1,  43,  68,  31
   2,  58, 498, 532
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*Nset, nset=Set-FIX
   2,   4,   5,   6,   7,   8
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*Elset, elset=Set-ALL, generate
    1,  1858,     1
*Elset, elset=_Surf-INN_SNEG, internal, generate
    1,  1858,     1
*Surface, type=ELEMENT, name=Surf-INN
_Surf-INN_SNEG, SNEG
*Elset, elset=_Surf-OUT_SPOS, internal, generate
    1,  1858,     1
*Surface, type=ELEMENT, name=Surf-OUT
_Surf-OUT_SPOS, SPOS
** Section: Section-DS20
*Shell Section, elset=Set-ALL, material=DRAGONSKIN20-OGDEN
0.001, 5
*End Part
**
*Part, name=MEMBRANE
*Node
      1,     0.129207,   1.29999995, 0.0264359992
      2, 0.0757720023,   1.21525002, 0.0837249979
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*Element, type=S3
   1, 1026,   46,  976
   2,  572, 1135,   83
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*Nset, nset=Set-FIX
    1,   15,   16,   17,   18,   26
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*Elset, elset=Set-ALL, generate
    1,  2969,     1
*Elset, elset=_Surf-INN_SNEG, internal, generate
    1,  2969,     1
*Surface, type=ELEMENT, name=Surf-INN
_Surf-INN_SNEG, SNEG
*Elset, elset=_Surf-OUT_SPOS, internal, generate
    1,  2969,     1
*Surface, type=ELEMENT, name=Surf-OUT
_Surf-OUT_SPOS, SPOS
** Section: Section-EF0030
*Shell Section, elset=Set-ALL, material=Ecoflex0030-OGDEN
0.001, 5
*End Part
**
*Part, name=WAIST-DOWN
*Node
      1,  0.145630002,  0.949133992, 0.0183320008
      2, -0.0158179998,   1.01300001, 0.0889459997
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*Element, type=S3
   1,  476,  272,  291
   2,  313, 1002,  610
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*Nset, nset=Set-FIX
   2,   3,   5,   6,   7,   9
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*Elset, elset=Set-ALL, generate
    1,  1884,     1
*Elset, elset=_Surf-OUT_SPOS, internal, generate
    1,  1884,     1
*Surface, type=ELEMENT, name=Surf-OUT
_Surf-OUT_SPOS, SPOS
*Elset, elset=_Surf-INN_SNEG, internal, generate
    1,  1884,     1
*Surface, type=ELEMENT, name=Surf-INN
_Surf-INN_SNEG, SNEG
** Section: Section-DS20
*Shell Section, elset=Set-ALL, material=DRAGONSKIN20-OGDEN
0.001, 5
*End Part
**
*Part, name=WAIST-MIDDLE
*Node
      1, 0.0897670016,   1.03645003, 0.0680849999
      2,  0.144093007,  0.996360004, 0.0183959994
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*Element, type=S3
   1, 561, 106,  89
   2,   5, 690, 172
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*Nset, nset=Set-FIX
   4,  20,  22,  23,  24,  26
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*Elset, elset=Set-ALL, generate
    1,  1525,     1
*Elset, elset=_Surf-OUT_SPOS, internal, generate
    1,  1525,     1
*Surface, type=ELEMENT, name=Surf-OUT
_Surf-OUT_SPOS, SPOS
*Elset, elset=_Surf-INN_SNEG, internal, generate
    1,  1525,     1
*Surface, type=ELEMENT, name=Surf-INN
_Surf-INN_SNEG, SNEG
** Section: Section-DS20
*Shell Section, elset=Set-ALL, material=DRAGONSKIN20-OGDEN
0.001, 5
*End Part
**
*Part, name=WAIST-UP
*Node
      1,  0.106219001,   1.01999998, 0.0539430007
      2,  0.126460999,   1.10000002, 0.0383610018
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*Element, type=S3
   1,  77, 112, 398
   2, 160, 419, 159
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*Nset, nset=Set-FIX
   1,   4,   5,   6,   7,   8
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*Elset, elset=Set-ALL, generate
    1,  1047,     1
*Elset, elset=_Surf-OUT_SPOS, internal, generate
    1,  1047,     1
*Surface, type=ELEMENT, name=Surf-OUT
_Surf-OUT_SPOS, SPOS
*Elset, elset=_Surf-INN_SNEG, internal, generate
    1,  1047,     1
*Surface, type=ELEMENT, name=Surf-INN
_Surf-INN_SNEG, SNEG
** Section: Section-DS20
*Shell Section, elset=Set-ALL, material=DRAGONSKIN20-OGDEN
0.001, 5
*End Part
**
**
** ASSEMBLY
**
*Assembly, name=Assembly
**
*Instance, name=CHEST-LEFT-1, part=CHEST-LEFT
*End Instance
**
*Instance, name=CHEST-RIGHT-1, part=CHEST-RIGHT
*End Instance
**
*Instance, name=MEMBRANE-1, part=MEMBRANE
*End Instance
**
*Instance, name=WAIST-DOWN-1, part=WAIST-DOWN
*End Instance
**
*Instance, name=WAIST-MIDDLE-1, part=WAIST-MIDDLE
*End Instance
**
*Instance, name=WAIST-UP-1, part=WAIST-UP
*End Instance
**
*Nset, nset=NdE-35-OUT, instance=WAIST-DOWN-1
    1,    2,    8,    9,   13,   14
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*Nset, nset=NdE-35-OUT, instance=WAIST-UP-1
   1,   5,   6,   7,  11,  13
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*Nset, nset=Nde-12345-OUT, instance=WAIST-MIDDLE-1, generate
   1,  824,    1
*Nset, nset=Nde-12345-OUT, instance=WAIST-UP-1
   2,   3,   4,   9,  10,  12
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*Nset, nset=Nde-12345-OUT, instance=CHEST-LEFT-1, generate
   1,  915,    1
*Nset, nset=Nde-12345-OUT, instance=WAIST-DOWN-1
    3,    4,    5,    6,    7,   10
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*Nset, nset=Nde-12345-OUT, instance=CHEST-RIGHT-1
   1,   2,   3,   4,   5,   6
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*Nset, nset=Set-22, instance=CHEST-LEFT-1
  23,  26,  51,  58,  65,  67
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*Nset, nset=Set-22, instance=CHEST-RIGHT-1
   2,   4,   5,   6,   7,   8
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*Nset, nset=Set-22, instance=MEMBRANE-1
    1,   15,   16,   17,   18,   26
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*Nset, nset=Set-22, instance=WAIST-DOWN-1
   2,   3,   5,   6,   7,   9
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*Nset, nset=Set-22, instance=WAIST-UP-1
   1,   4,   5,   6,   7,   8
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*Nset, nset=Set-FIX, instance=CHEST-LEFT-1
  23,  26,  51,  58,  65,  67
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*Nset, nset=Set-FIX, instance=CHEST-RIGHT-1
   2,   4,   5,   6,   7,   8
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*Nset, nset=Set-FIX, instance=MEMBRANE-1
    1,   15,   16,   17,   18,   26
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*Nset, nset=Set-FIX, instance=WAIST-MIDDLE-1
   4,  20,  22,  23,  24,  26
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*Nset, nset=Set-FIX, instance=WAIST-DOWN-1
   2,   3,   5,   6,   7,   9
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*Nset, nset=Set-FIX, instance=WAIST-UP-1
   1,   4,   5,   6,   7,   8
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*Elset, elset=_Surf-12-OUT_SPOS, internal, instance=CHEST-LEFT-1, generate
    1,  1722,     1
*Elset, elset=_Surf-12-OUT_SPOS, internal, instance=CHEST-RIGHT-1, generate
    1,  1858,     1
*Surface, type=ELEMENT, name=Surf-12-OUT
_Surf-12-OUT_SPOS, SPOS
*Elset, elset=_Surf-35-OUT_SPOS, internal, instance=WAIST-DOWN-1, generate
    1,  1884,     1
*Elset, elset=_Surf-35-OUT_SPOS, internal, instance=WAIST-UP-1, generate
    1,  1047,     1
*Surface, type=ELEMENT, name=Surf-35-OUT
_Surf-35-OUT_SPOS, SPOS
*Elset, elset=_Surf-12345-OUT_SPOS, internal, instance=CHEST-RIGHT-1, generate
    1,  1858,     1
*Elset, elset=_Surf-12345-OUT_SPOS, internal, instance=CHEST-LEFT-1, generate
    1,  1722,     1
*Elset, elset=_Surf-12345-OUT_SPOS, internal, instance=WAIST-MIDDLE-1, generate
    1,  1525,     1
*Elset, elset=_Surf-12345-OUT_SPOS, internal, instance=WAIST-DOWN-1
    3,    4,    8,    9,   13,   14
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*Elset, elset=_Surf-12345-OUT_SPOS, internal, instance=WAIST-UP-1
    2,    4,    5,    6,    7,    8
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*Surface, type=ELEMENT, name=Surf-12345-OUT
_Surf-12345-OUT_SPOS, SPOS
*Surface, type=NODE, name=NdE-35-OUT_CNS_, internal
NdE-35-OUT, 1.
*Surface, type=NODE, name=Nde-12345-OUT_CNS_, internal
Nde-12345-OUT, 1.
*Surface, type=NODE, name=WAIST-MIDDLE-1_Set-FIX_CNS_, internal
WAIST-MIDDLE-1.Set-FIX, 1.
** Constraint: CONSTRAINT-TIE
*Tie, name=CONSTRAINT-TIE, adjust=yes, position tolerance=0.01
WAIST-MIDDLE-1_Set-FIX_CNS_, Surf-35-OUT
*End Assembly
*Amplitude, name=Amp-1
             0.,              0.,              1.,             0.5
*Amplitude, name=Amp-2
             0.,             0.5,              1.,              1.
**
** MATERIALS
**
*Material, name=DRAGONSKIN20-OGDEN
*Hyperelastic, n=3, ogden
 1.3077e+06,      1.1087, -2.3497e+06,     -0.0317,  1.2075e+06,     -1.6291,     4.9e-07,          0.
          0.,
*Material, name=Ecoflex0030-OGDEN
*Hyperelastic, n=3, ogden
1887.,   -3.848,   22250.,    0.663,    3574.,    4.225, 2.93e-06,       0.
       0.,
*Material, name=SILICON
*Density
1070.,
*Hyperelastic, mooney-rivlin
125900.,-17900.,     0.
**
** INTERACTION PROPERTIES
**
*Surface Interaction, name=INTPROP-1
1.,
*Friction
0.,
*Surface Behavior, no separation, pressure-overclosure=HARD
*Surface Interaction, name=IntProp-2
1.,
*Friction
0.,
**
** BOUNDARY CONDITIONS
**
** Name: BC-FIX Type: Symmetry/Antisymmetry/Encastre
*Boundary
Set-22, PINNED
**
** INTERACTIONS
**
** Interaction: INT-Nde-35-4
*Contact Pair, interaction=IntProp-2, type=SURFACE TO SURFACE
NdE-35-OUT_CNS_, WAIST-MIDDLE-1.Surf-INN
** Interaction: INT-Nde-12345-6
*Contact Pair, interaction=IntProp-2, type=SURFACE TO SURFACE
Nde-12345-OUT_CNS_, MEMBRANE-1.Surf-INN
** ----------------------------------------------------------------
**
** STEP: Step-1
**
*Step, name=Step-1, nlgeom=YES, inc=1000
*Static
0.001, 1., 1e-07, 0.1
*Solution Technique, type=QUASI-NEWTON
**
** LOADS
**
** Name: PRS-W-DOWN   Type: Pressure
*Dsload, amplitude=Amp-1
WAIST-DOWN-1.Surf-INN, P, 20.
** Name: PRS-W-UP   Type: Pressure
*Dsload, amplitude=Amp-1
WAIST-UP-1.Surf-INN, P, 234.375
**
** OUTPUT REQUESTS
**
*Restart, write, frequency=0
**
** FIELD OUTPUT: F-Output-1
**
*Output, field, variable=PRESELECT
**
** HISTORY OUTPUT: H-Output-1
**
*Output, history, variable=PRESELECT
*End Step
** ----------------------------------------------------------------
**
** STEP: Step-2
**
*Step, name=Step-2, nlgeom=YES, inc=1000
*Static
0.001, 1., 1e-07, 0.1
*Solution Technique, type=QUASI-NEWTON
**
** LOADS
**
** Name: PRS-W-DOWN   Type: Pressure
** Name: PRS-W-MID   Type: Pressure
*Dsload
WAIST-MIDDLE-1.Surf-INN, P, 1500.
** Name: PRS-W-UP   Type: Pressure
**
** OUTPUT REQUESTS
**
*Restart, write, frequency=0
**
** FIELD OUTPUT: F-Output-2
**
*Output, field, variable=PRESELECT
**
** HISTORY OUTPUT: H-Output-2
**
*Output, history, variable=PRESELECT
*End Step
** ----------------------------------------------------------------
**
** STEP: Step-3
**
*Step, name=Step-3, nlgeom=YES, inc=1000
*Static
0.001, 1., 1e-07, 0.1
**
** LOADS
**
** Name: PRS-W-UP   Type: Pressure
*Dsload, amplitude=Amp-2
WAIST-UP-1.Surf-INN, P, 234.375
**
** OUTPUT REQUESTS
**
*Restart, write, frequency=0
**
** FIELD OUTPUT: F-Output-2
**
*Output, field, variable=PRESELECT
**
** HISTORY OUTPUT: H-Output-2
**
*Output, history, variable=PRESELECT
*End Step
** ----------------------------------------------------------------
**
** STEP: Step-4
**
*Step, name=Step-4, nlgeom=YES, inc=1000
*Static
0.001, 1., 1e-07, 0.1
**
** LOADS
**
** Name: PRS-W-DOWN   Type: Pressure
*Dsload, amplitude=Amp-2
WAIST-DOWN-1.Surf-INN, P, 20.
** Name: PRS-W-UP   Type: Pressure
**
** OUTPUT REQUESTS
**
*Restart, write, frequency=0
**
** FIELD OUTPUT: F-Output-2
**
*Output, field, variable=PRESELECT
**
** HISTORY OUTPUT: H-Output-2
**
*Output, history, variable=PRESELECT
*End Step
** ----------------------------------------------------------------
**
** STEP: Step-5
**
*Step, name=Step-5, nlgeom=YES, inc=1000
*Static
0.001, 1., 1e-07, 0.1
**
** LOADS
**
** Name: PRS-C-LEFT   Type: Pressure
*Dsload
CHEST-LEFT-1.Surf-INN, P, 2390.63
** Name: PRS-C-RIGHT   Type: Pressure
*Dsload
CHEST-RIGHT-1.Surf-INN, P, 2390.63
** Name: PRS-W-DOWN   Type: Pressure
**
** OUTPUT REQUESTS
**
*Restart, write, frequency=0
**
** FIELD OUTPUT: F-Output-2
**
*Output, field, variable=PRESELECT
**
** HISTORY OUTPUT: H-Output-2
**
*Output, history, variable=PRESELECT
*End Step
